a := 0
b := π
dx := π/4
n := (b - a)/dx = 4
i := 1 .. n + 1
x[0] := a
x[i] := x[i - 1] + dx
f(x) := sin(1.8*x)
x = [0; 0.785398; 1.5708; 2.35619; 3.14159; 3.92699]
f(x) = [0; 0.987688; 0.309017; -0.891007; -0.587785; 0.707107]
Njuton(t) :=
    for i ∈ 0 .. n
        r[i, 0] ← f(x[i])
    for k ∈ 1 .. n
        for i ∈ 0 .. n - k
            r[i, k] ← (r[i + 1, k - 1] - r[i, k - 1])
    s ← f(x[0])
    for k ∈ 1 .. n
        p ← 1
        for i ∈ 0 .. k - 1
            p ← p*(t - x[i])
        s ← r[0, k]/(k!*dx^k)*p + s
    s
dfs(x) := (f(x + dx) - f(x - dx))/(2*dx)
L(xx) := sum(f(x[j])*product(if(k == j, 1, (xx - x[k])/(x[j] - x[k])), k = 0 .. n), j = 0 .. n)
df(x) := (f(x + dx) - f(x))/dx
dfs(x[i - 1]) = [1.25756; 0.196726; -1.19601; -0.570922; 1.01739]
L(x[i - 1]) = [0; 0.987688; 0.309017; -0.891007; -0.587785]
df(x[i - 1]) = [1.25756; -0.864111; -1.52792; 0.386073; 1.64871]
RL(x) := f(x) - L(x)
RL(x[i - 1]) = [0; 0; 0; 0; 0]
dL(x) := (L(x + dx) - L(x))/dx
dL(x[i - 1]) = [1.25756; -0.864111; -1.52792; 0.386073; 5.99779]
RN(x) := f(x) - Njuton(x)
Njuton(x[i - 1]) = [0; 0.987688; 0.309017; -0.891007; -0.587785]
RN(x[i - 1]) = [0; 0; -1.66533e-16; 0; 1.11022e-16]
dN(x) := (Njuton(x + dx) - Njuton(x))/dx
dN(x[i - 1]) = [1.25756; -0.864111; -1.52792; 0.386073; 5.99779]
